units                   real
atom_style              charge
boundary                f f f

processors		* * *
region		        sim_space block -8 320 -8 320 -50 50 units box
create_box	        1 sim_space


# Create graphene sheet
region                  graphene_space block -5 320 -5 320 -3 3 units box
read_dump               structures/30nm_30nm_graphene.what 0 x y z box no add yes
group                   graphene region graphene_space

# Mass of carbon
mass                    1 12.01

# Insert C60 object
molecule		C60 C60.mol
region                  fulleren_space sphere 150 150 -10 5 units box
create_atoms		0 single 150 150 -10 mol C60 123 units box
group                   fulleren region fulleren_space

# Keep its center of mass
compute			fa_com fulleren com
variable                fa_x_com equal c_fa_com[1]
variable                fa_y_com equal c_fa_com[2]
variable                fa_z_com equal c_fa_com[3]
fix                     a_com_print all print 100 "${fa_x_com} ${fa_y_com} ${fa_z_com}" file data/a_fullerene_pos.dat screen no

# Insert another C60 object
region                  b_fulleren_space sphere 160 160 -10 5 units box
# create_atoms		0 single 160 160 -10 mol C60 123 units box
group                   b_fulleren region b_fulleren_space

# Get center of mass for the second fullerene as well
# compute			fb_com b_fulleren com
# variable                fb_x_com equal c_fb_com[1]
# variable                fb_y_com equal c_fb_com[2]
# variable                fb_z_com equal c_fb_com[3]
# fix                     b_com_print all print 200 "${fb_x_com} ${fb_y_com} ${fb_z_com}" file data/b_fullerene_pos.dat screen no

# Make membrane circular
region                  notDel sphere 150 150 0 150 units box
group			notDel region notDel
group			del subtract all notDel
# delete_atoms		group del

# Potential settings
# FIXME *neighbor bin* stopped working for some reason
neighbor        	1.0 bin
neigh_modify    	every 1 delay 0

# Type of potential?
pair_style              reax/c NULL
pair_coeff              * * ffield.reax.cho C

dump			MyDump all custom 20 pilotwave.lammpstrj element x y z
dump_modify		MyDump sort id element C

thermo                  50


# Obligatory fix
fix                     NVE all nve

# Carbon - carbon potential is here
fix                     1 all qeq/reax 1 0.0 10.0 1e-6 reax/c

# Apply gravitish force
fix                     gravity fulleren addforce 0.0 0.0 0.6
fix                     b_gravity b_fulleren addforce 0.0 0.0 0.6
timestep                0.5

# APPLAY PERIODIC FORCE
variable		sinForce equal swiggle(0,0.5,1180)
fix                     wavee graphene addforce 0.0 0.0 v_sinForce
fix                     graphene_spring graphene spring/self 1.0 z

# Stabilzation period
fix			vis all viscous 400
run			800

# Allow graphene atoms to move up or down only
fix			move_vertical graphene setforce 0.0 0.0 NULL
# Full run
fix			vis all viscous 30
run                     500000
